// COMSOL Multiphysics 6.1.0.357 model "Molybdenum2D.mph"
// Outline of the model tree

Parameters
  R = 8.31446261815324 [J/(mol*K)]  // Gas constant
  T0 = 50 [degC]  // Initial temperature
  Tamb = T0  // Ambient temperature
  dwidth = 100 [um]  // Thickness value for boundary conduction
  epsilon = 0.15*D  // interface thickness
  D = 100 [um]  // Particle size
  Nx = 10  // Number of particles in x direction
  Ny = 2  // Number of particles in the y direction
  Lheight = 100 [um]  // Height of previous layer
  vlaser = 500 [mm/s]  // Laser speed
  Ep = 300 [W]  // Laser power
  laserpenetration = D  // Laser penetration depth
  A = 0.5  // Laser power absorption factor
  rlaser = 50 [um]  // Radial distance of laser width
  xr = onlocation - vlaser * ontime
  yr = Lheight + D*Ny
  onlocation = 2*D + D/2
  ontime = 0.02 [s]
  offtime = 0.16 [s]
  Dp1 = 1/(3*kappa)  // Radiation factor assuming no scattering
  n = 1
  kappa = 1/pd  // Absorption coefficient over all wavelengths of light
  sigma_b = 5.67e-8 [W/(m^2*K^4)]  // Stefan Boltzmann constant
  pd = 80 [um]  // Penetration depth of light

Functions
  rect1: Rectangle "onoff" | funcname = onoff; lower = ontime; upper = offtime; smooth = 0.001
  gp1: GaussianPulse "delta" | funcname = delta; sigma = 5

Variables
  var1 "Variables 1"
    Ed = Ep / (D*pi*rlaser^2)
    G_space = exp(-1* ( (x - (xr+vlaser*t) )^2 ) / (2 * rlaser^2 ) )
    BeerLambert = exp( (y - yr) / laserpenetration)
    Qlaser = A*Ed*G_space*onoff(t) * BeerLambert * pf.Vf2
    k = mat1.def.k(T0)*pf.Vf1 + mat2.def.k(T)*pf.Vf2
    rho = mat1.def.rho(1 [atm], T0)*pf.Vf1 + mat2.def.rho(T0)*pf.Vf2  // Density
    Cp = mat1.def.Cp(T0)*pf.Vf1 + mat2.def.Cp(T)*pf.Vf2  // Heat capacity at constant pressure
    mu = mat1.def.eta(T0)*pf.Vf1 + mat2.def.mu(T)*pf.Vf2 + 0.005  // Dynamic viscosity
    sigma = mat2.def.sigma(T)
    lambda = 3*epsilon*sigma/sqrt(8)
    Fstx = lambda/(epsilon^2) * psi * phipfx
    Fsty = lambda/(epsilon^2) * psi * phipfy
    Qr = kappa*(Grad - 4*pi*Ib)
    Ib = n^2*sigma_b*T^4/pi * pf.Vf2

Probes
  point3: Point "Density Probe" on points 4, 6, 7, 9, 11, 12, 14, 16, 17, 19, 21, 22, 24, 26, 27, 29, 31, 32, 34, 36, 37, 39, 41, 42, 44, 46, 47, 49, 51, 52, 54
    probename = rhoprobe
    expr = rho
    unit = kg/m^3
    descr = Density
    frame = spatial
    table = tbl2
  point4: Point "Porosity Probe" on points 6, 11, 16, 21, 26, 31, 36, 41, 46, 51
    probename = porosity
    expr = pf.Vf1
    unit = 1
    descr = Volume fraction of fluid 1
    frame = spatial
    table = tbl2

Coordinate systems
  sys1: Boundary "Boundary System 1" | name = sys2

Geometry
  geom2 "Geometry 1" (2D, length unit µm)
    c1: Circle | pos = {D/2 + D, D/2 + Lheight}; r = D/2
    arr1: Array | input = c1; size = {Nx, Ny}; fullsize = {Nx, Ny}; displ = {D, D}
    r1: Rectangle | size = {D*(Nx+2), Lheight + D*Ny*2}
    r2: Rectangle | size = {D*(Nx+2), Lheight}
    fin: Finalize "Form Union"

Materials
  mat1: Common "Oxygen" on no domains
    def "Basic"
      dynamicviscosity = eta(T)
      ratioofspecificheat = 1.4
      heatcapacity = Cp(T)
      density = rho(pA,T)
      thermalconductivity = k(T)
      eta: Piecewise | arg = T; pieces = {150.0, 600.0, -5.55818182E-7+9.24202797E-8*T^1-8.71841492E-11*T^2+4.82983683E-14*T^3}; argunit = K; fununit = Pa*s
      Cp: Piecewise | arg = T; pieces = {150.0, 600.0, 959.514545-0.416383077*T^1+7.63158508E-4*T^2+1.46018648E-6*T^3-3.24009324E-9*T^4+1.6E-12*T^5}; argunit = K; fununit = J/(kg*K)
      rho: Analytic | expr = pA*0.032/R_const[K*mol/J]/T; args = {pA, T}; dermethod = manual; argders = {{pA, d(pA*0.032/R_const/T,pA)}, {T, d(pA*0.032/R_const/T,T)}}; fununit = kg/m^3; argunit = {Pa, K}
      k: Piecewise | arg = T; pieces = {150.0, 600.0, -0.0070110303+1.688723E-4*T^1-2.28911422E-7*T^2+1.6991453E-10*T^3}; argunit = K; fununit = W/(m*K)
    idealGas
      Rs = R_const/Mn
      heatcapacity = Cp(T)
      ratioofspecificheat = 1.4
      molarmass = 0.03199
      Cp: Piecewise | arg = T; pieces = {150.0, 600.0, 959.514545-0.416383077*T^1+7.63158508E-4*T^2+1.46018648E-6*T^3-3.24009324E-9*T^4+1.6E-12*T^5}; argunit = K; fununit = J/(kg*K)
  mat2: Common "Molybdenum" on no domains
    def "Basic"
      thermalexpansioncoefficient = 5.3e-5[1/K]
      density = 10200[kg/m^3]
      heatcapacity = Cp(T)
      thermalconductivity = 138[W/(m*K)]
      an1: Analytic "Cp" | funcname = Cp; expr = (34.2 + 1.13 *10^(-3) * (T - 2896 [K] ) ) * ( 1 / 95.5 ) + 3.5183e5 * delta( T - 2896 [K] ); args = T; fununit = J/(g*K); argunit = K
      an2: Analytic "sigma" | funcname = sigma; expr = (2.29 * 10^3 - 0.26 * (T - 2896 [K]) ) * 0.001; args = T; fununit = N/m; argunit = K
      an4: Analytic "rho" | funcname = rho; expr = 10.2*exp(1.22707649158e-05*(273- T) + 8.71833722936e-09*(273^2 - T^2)/2 - 7.79970304032e-12*(273^3 - T^3)/3 + 5.77704867949e-15*(273^4 - T^4)/4); args = T; fununit = g/cm^3; argunit = K
      an5: Analytic "k" | funcname = k; expr = 138[W/(m*K)]; args = T; fununit = W/(m*K); argunit = K
      pw1: Piecewise "mu" | funcname = mu; arg = T; smooth = contd2; pieces = {{200, 500, 120}, {500, 3000, 0.27 * exp(73e3 / (R*T) ) * 0.001}}; argunit = K; fununit = Pa*s
    Enu "Young's modulus and Poisson's ratio"
      E = 312[GPa]
      nu = 0.31
    Murnaghan
      l = -300[GPa]
      m = -850[GPa]
      n = -910[GPa]

Physics
  spf: LaminarFlow on all domains
    dependent variable u = {u, v, w}
    ShapeProperty.order_fluid = 3
    EquationForm.form = Transient
    PhysicalModelProperty.IncludeGravity = 1
    PhysicalModelProperty.Tref = T0
    PhysicalModelProperty.pref = 1 [atm]
    TurbulenceModelProperty.TurbulenceModel = AlgebraicYplus
    InconsistentStabilization.IsotropicDiffusion = 1
    AdvancedSettingProperty.useBNS = 1
    fp1: FluidProperties (default) | rho_mat = userdef; rho = rho; minput_temperature = T; mu_mat = userdef; mu = mu
    init1: init "Initial Values 1" (default)
      p_init = 1[atm]
      CompensateForHydrostaticPressureApproximation = 0
      CompensateForHydrostaticPressure = 0
    wallbc1: WallBC "Wall 1" (default) | beta_factor = 1
    grav1: Gravity
    vf2: VolumeForce "Surface Tension" on all domains | F = {Fstx, Fsty, 0}
    out1: OutletBoundary "Outlet 1" on boundaries 5 | p0 = 1 [atm]; NormalFlow = 1; CompensateForHydrostaticPressure = 0
  pf: PhaseField on all domains
    dependent variable phipf
    ShapeProperty.order_phasefield = 2
    pfm1: PhaseFieldModel (default) | epsilon_pf = epsilon; chi = 0; U = 1e-12; u = {u, v, 0}; sigma = sigma
    init1: init "Initial Values 1" (default)
    initfluid2: initFluid2 "Initial Values, Fluid 2" on domains 1, 12, 13, 15, 16, 18, 19, 21, 22, 24, 25, 27, 28, 30, 31, 33, 34, 36, 37, 39, 40
    ww1: WettedWall (default) | surfaceE1 = 0.001[J/m^2]; surfaceE2 = 0.001[J/m^2]
    out1: Outlet on boundaries 5
  ht: HeatTransferInFluids on all domains
    dependent variable T
    PhysicalModelProperty.dz = dwidth
    PhysicalModelProperty.Tref = 300
    InconsistentStabilization.HeatIsotropicDiffusion = 1
    fluid1: FluidHeatTransferModel "Fluid 1" (default)
      Cp_mat = userdef
      Cp = Cp
      rho_mat = userdef
      rho = rho
      k_mat = userdef
      k = k
      u = {u, v, 0}
      minput_pressure_src = root.comp1.spf.pA
    init1: init "Initial Values 1" (default) | Tinit = T0
    ins1: ThermalInsulation (default)
    hs1: HeatSource on domains 1-40 | Q0 = Qlaser; materialType = nonSolid
    hs2: HeatSource on domains 1-40 | Q0 = Qr; materialType = nonSolid
    hf1: HeatFluxBoundary "Heat Flux 1" on all boundaries | q0_input = k*(Tamb - T) / ht.dz
  rteeq: PoissonEquation "RTE" on all domains
    dependent variable Grad
    ShapeProperty.order = 1
    ShapeProperty.valueType = real
    EquationForm.form = Automatic
    Units.DependentVariableQuantity = none
    Units.CustomDependentVariableUnit = W*m^-2
    Units.CustomSourceTermUnit = W*m^-3
    peq1: PoissonEquation "Poisson's Equation 1" (default) | f = -Qr; c = {Dp1, 0, 0, Dp1}
    zflx1: ZeroFluxBoundary "Zero Flux 1" (default)
    init1: init "Initial Values 1" (default)
    flux1: FluxBoundary "Flux/Source 1" on boundaries 1-3, 5, 16, 17 | g = 0.5*(4*pi*Ib - Grad)

Mesh
  mesh3 "Mesh 2"
    size: MeshSizeDefault | table = cfd; hmax = 10; hmin = 8; hgrad = 2; hauto = 6; custom = on
    ftri1: FreeTri "Free Triangular 1" on remaining entities | smoothmaxiter = 10; method = del
      size1: Size on entire geometry
        hmax = 0.5*D
        hmin = 0.25*D
        hcurve = 0.5
        hnarrow = 0.1
        hgrad = 5
        hauto = 3
        custom = on

Studies
  std1 "Study 1"
    param: Parametric "Parametric Sweep" (disabled)
      sweeptype = filled
      pname = {Ep, vlaser, laserpenetration}
      plistarr = {"100, 150, 200, 250", "100 [mm/s], 300 [mm/s], 500 [mm/s]", D}
      punit = {W, m/s, m}
    phasei: PhaseInitialization | solve for = {pf, ht}
    time: Transient "Time Dependent"
      tlist = range(0,0.01,0.04)
      usertol = on
      rtol = 0.1
      useinitsol = on
      initstudy = std1

Solver configurations
  sol1 "Solution 1" (study std1)
    v1: Variables "Dependent Variables 1.1"
    s1: Stationary "Stationary Solver 1.1"
      fc1: FullyCoupled | linsolver = d1; initstep = 0.01; minstep = 1.0E-6; maxiter = 50
      d1: Direct "Direct, interface distance (pf)" | linsolver = pardiso; pivotperturb = 1.0E-13
    su1: StoreSolution "Solution Store 1.1"
    v2: Variables "Dependent Variables 2.1" | resscalemethod = manual; notsolmethod = sol
      comp1_phipf: Field "Phase field variable (comp1.phipf)" | scalemethod = manual; scaleval = 1
    t1: Time "Time-Dependent Solver 1.1"
      tlist = range(0,0.001,1)
      rtol = 0.005
      atolglobalfactor = 0.05
      atolmethod = {comp1_GI, global, comp1_p, scaled, comp1_phipf, global, comp1_psi, global, comp1_T, global, comp1_u, global, comp1_Grad, global}
      atolfactor = {comp1_GI, 0.1, comp1_p, 1, comp1_phipf, 0.1, comp1_psi, 0.1, comp1_T, 0.1, comp1_u, 0.1, comp1_Grad, 0.1}
      maxstepconstraintbdf = const
      maxstepbdf = 0.001
      maxorder = 2
      stabcntrl = on
      bwinitstepfrac = 0.01
      estrat = exclude
      fc1: FullyCoupled
        linsolver = d1
        maxiter = 8
        ntolfact = 0.5
        damp = 0.9
        jtech = once
        stabacc = aacc
        aaccdim = 5
        aaccmix = 0.9
        aaccdelay = 1
      d1: Direct "Direct, heat transfer variables (ht) (merged)" | linsolver = pardiso; pivotperturb = 1.0E-13
  sol2 "Solution Store 1.1" (study std1)
  sol3 "Refined Mesh Solution 1" (study std1)
  sol4 "Solution 4" (study std1)
    v1: Variables "Dependent Variables 1.1"
    s1: Stationary "Stationary Solver 1.1"
      fc1: FullyCoupled | linsolver = d1; initstep = 0.01; minstep = 1.0E-6; maxiter = 50
      d1: Direct "Direct, interface distance (pf)" | linsolver = pardiso; pivotperturb = 1.0E-13
    su1: StoreSolution "Solution Store 1"
    v2: Variables "Dependent Variables 2.1" | resscalemethod = manual; notsolmethod = sol
      comp1_phipf: Field "Phase field variable (comp1.phipf)" | scalemethod = manual; scaleval = 1
      comp1_T: Field "Temperature (comp1.T)" | scalemethod = manual; scaleval = 10
    t1: Time "Time-Dependent Solver 1.1"
      tlist = range(0,0.01,0.04)
      rtol = 0.1
      atolglobalfactor = 1
      atolmethod = {comp1_GI, global, comp1_p, scaled, comp1_phipf, global, comp1_psi, global, comp1_T, global, comp1_u, global, comp1_Grad, global}
      atolfactor = {comp1_GI, 0.1, comp1_p, 1, comp1_phipf, 0.1, comp1_psi, 0.1, comp1_T, 0.1, comp1_u, 0.1, comp1_Grad, 0.1}
      maxstepconstraintbdf = const
      maxstepbdf = 0.001
      maxorder = 1
      stabcntrl = on
      bwinitstepfrac = 0.01
      estrat = exclude
      fc1: FullyCoupled | linsolver = d1; dtech = auto; maxiter = 15; ntolfact = 0.05; termonres = both
      d1: Direct "Direct, heat transfer variables (ht) (merged)" | linsolver = pardiso; pivotperturb = 1.0E-13
  sol5 "Solution Store 1" (study std1)
  sol6 "Parametric Solutions 1" (study std1)
  sol19 "Parametric Solutions 2" (study std1)
  sol33 "Parametric Solutions 3" (study std1)
  sol35 "Parametric Solutions 4" (study std1)
  sol37 "Parametric Solutions 5" (study std1)

Datasets
  dset1: Solution | solution = sol1
  dset2: Solution | solution = sol2
  dset3: Solution "Probe Solution 3" | solution = sol37
  dset4: Solution | solution = sol3
  an1_ds1: Grid1D "Grid 1D 1a"
    function = all
    data = none
    par1 = T
    parmin1 = 300
    parmax1 = 400
    res1 = 10000
    distribution = mixed
  dset5: Solution | solution = sol4
  dset6: Solution | solution = sol5
  dset7: Solution | solution = sol6
  avh4: Average "Density Probe" on points 4, 6, 7, 9, 11, 12, 14, 16, 17, 19, 21, 22, 24, 26, 27, 29, 31, 32, 34, 36, 37, 39, 41, 42, 44, 46, 47, 49, 51, 52, 54
    data = dset3
  avh5: Average "Porosity Probe" on points 6, 11, 16, 21, 26, 31, 36, 41, 46, 51 | data = dset3
  dset8: Solution | solution = sol19
  dset9: Solution | solution = sol33
  dset10: Solution | solution = sol35
  pw1_ds1: Grid1D
  dset11: Solution | solution = sol37

Derived values
  pev4: EvalPoint "Density Probe" | data = avh4; table = tbl2; expr = rho
  pev5: EvalPoint "Porosity Probe" | data = avh5; table = tbl2; expr = pf.Vf1

Tables
  tbl1: Table "Probe Table 1"
    Time (s) | ht.T (K), Point Probe 1 {avh1} | Temperature (K), Point Probe 2 {avh2}
    0 | 300 | 300
    4e-05 | 300 | 300
    8e-05 | 300 | 300
    0.00016 | 300 | 300
    0.00032 | 300 | 300
    0.00064 | 300 | 300
    0.00128 | 300 | 300
    0.00228 | 300 | 300
    0.00328 | 300 | 300
    0.00428 | 300 | 300
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  tbl2: Table "Probe Table 2"
    Ep (W) | vlaser (m/s) | laserpenetration (m) | Time (s) | Temperature (1), Porosity Probe {avh5}
    100 | 0.1 | 0.0001 | 0 | 0.5
    100 | 0.1 | 0.0001 | 0.01 | 0.483191
    100 | 0.1 | 0.0001 | 0.02 | 0.457058
    100 | 0.1 | 0.0001 | 0.03 | 0.310246
    100 | 0.1 | 0.0001 | 0.04 | 0.30176
    100 | 0.3 | 0.0001 | 0 | 0.5
    100 | 0.3 | 0.0001 | 0.01 | 0.483191
    100 | 0.3 | 0.0001 | 0.02 | 0.457054
    100 | 0.3 | 0.0001 | 0.03 | 0.372786
    100 | 0.3 | 0.0001 | 0.04 | 0.349561
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  tbl4: Table "Objective Table 4"
    vlaser (m/s) | Objective
    0.5 | 7273.18
    0.525325 | 7229.73
    0.63015 | 7225.29
    0.757814 | 7309.44
    0.660772 | 7286.46

Plots
  pg1: PlotGroup2D "Heating and Volume Fraction" | data = dset5
    surf1: Surface | expr = Qlaser; unit = W/m^3
    con1: Contour | expr = pf.Vf2
  pg10: PlotGroup2D "Temperature and Volume Fraction" | data = dset5
    surf1: Surface | expr = T
    con1: Contour | expr = pf.Vf2
  pg2: PlotGroup2D "Pressure and Volume Fraction" | data = dset11
    surf1: Surface | expr = pf.Vf2
    con1: Contour | expr = p
  pg3: PlotGroup2D "Velocity and Volume Fraction" | data = dset10
    surf1: Surface | expr = spf.U
    con1: Contour | expr = pf.Vf2
    arwl1: ArrowLine (disabled) | expr = {u, v}
  pg4: PlotGroup2D "Viscosity" | data = dset5; title = Fluid viscosity (Pa*s) with Volume Fraction contours
    surf1: Surface | expr = mu
    con1: Contour | expr = pf.Vf2
  pg7: PlotGroup1D "Density Probe Measurement" | xlabel = t (s); ylabel = Density
    tblp3: Table "Probe Table Graph 3" | table = tbl2; xaxisdata = auto; plotcolumninput = manual; plotcolumns = 5
    tblp4: Table "Probe Table Graph 4" | table = tbl1; plotcolumninput = manual
  pg8: PlotGroup2D "Density" | data = dset5
    surf1: Surface | expr = rho
  pg11: PlotGroup1D "Viscosity Plot"
    data = pw1_ds1
    title = Temperature Dependent Viscosity of Molybdenum
    xlabel = Temperature (K)
    ylabel = Viscosity (Pa s)
    plot1: Function | expr = comp1.mat7.def.mu(T)

Exports
  anim1: Animation "Temperature and Vf2"
    giffilename = /users/m/s/mshourya/SLS/Complete/Results/T+Vf2.gif
    framesel = all
    size = current
  anim2: Animation "Pressure and Vf2"
    giffilename = /users/m/s/mshourya/SLS/Complete/Results/p+Vf2.gif
    framesel = all
    size = current
  anim3: Animation "Heating and Vf2"
    giffilename = /users/m/s/mshourya/SLS/Complete/Results/Heating+Vf2.gif
    framesel = all
    size = current
  data1: Data "Average Density"
    data = avh4
    expr = {T, Grad}
    filename = /users/m/s/mshourya/SLS/Complete/Results/densityprobe.csv
    separator = ,