// COMSOL Multiphysics 6.1.0.357 model "Polyamide3DModel.mph"
// Outline of the model tree

Parameters
  R = 8.31446261815324 [J/(mol*K)]  // Gas constant
  T0 = 50 [degC]  // Initial temperature
  Tamb = T0  // Ambient temperature
  dwidth = 100 [um]  // Thickness value for boundary conduction
  epsilon = 0.15*D  // interface thickness
  D = 100 [um]  // Particle size
  Nx = 10  // Number of particles in x direction
  Ny = 2  // Number of particles in the y direction
  Lheight = 100 [um]  // Height of previous layer
  vlaser = 200 [mm/s]  // Laser speed
  Ep = 3 [W]  // Laser power
  laserpenetration = D  // Laser penetration depth
  A = 0.95  // Laser power absorption factor
  rlaser = D  // Radial distance of laser width
  xr = onlocation - vlaser * ontime
  yr = (Ny+2)*D/2
  zr = Lheight + D
  onlocation = 0 [um]
  ontime = 0.02 [s]
  offtime = 0.16 [s]
  Dp1 = 1/(3*kappa)  // Radiation factor assuming no scattering
  n = 1
  kappa = 1/pd  // Absorption coefficient over all wavelengths of light
  sigma_b = 5.67e-8 [W/(m^2*K^4)]  // Stefan Boltzmann constant
  pd = 80 [um]  // Penetration depth of light

Functions
  rect2: Rectangle "onoff" | funcname = onoff; lower = ontime; upper = offtime; smooth = 0.001
  gp2: GaussianPulse "delta" | funcname = delta

Variables
  var2 "Variables 2"
    Ed = Ep / (4/3*pi*rlaser^3)
    G_space = exp(-1* ( (x - (xr+vlaser*t) )^2 + (y - yr)^2 ) / (2 * rlaser^2 ) )
    BeerLambert = exp( (z - zr) / laserpenetration)
    Qlaser = A*Ed*G_space*onoff(t) * BeerLambert * pf2.Vf2
    k = mat9.def.k(T0)*pf2.Vf1 + mat10.def.k(T2)*pf2.Vf2
    rho = mat9.def.rho(1 [atm], T0)*pf2.Vf1 + mat10.def.rho*pf2.Vf2  // Density
    Cp = mat9.def.Cp(T2)*pf2.Vf1 + mat10.def.Cp(T2)*pf2.Vf2  // Heat capacity at constant pressure
    mu = mat9.def.eta(T0)*pf2.Vf1 + 0.001  // Dynamic viscosity
    eta = mat10.rheo.A(T2)*mat10.rheo.aT(T2) + 0.001
    lambdap = mat10.rheo.B(T2)*mat10.rheo.aT(T2)
    neta = 2*mat10.rheo.C(T2)+1
    sigma = mat10.def.sigma(T2)
    lambda = 3*epsilon*sigma/sqrt(8)
    Fstx = lambda/(epsilon^2) * psi2 * phipf2x
    Fsty = lambda/(epsilon^2) * psi2 * phipf2y
    Fstz = lambda/(epsilon^2) * psi2 * phipf2z
    Qr = kappa*(Grad2 - 4*pi*Ib)
    Ib = n^2*sigma_b*T2^4/pi * pf2.Vf2

Geometry
  geom3 "Geometry 2" (3D, length unit µm)
    sph1: Sphere | pos = {1.5*D, 1.5*D, 0.5*D+Lheight}; r = D/2
    arr1: Array | input = sph1; size = {Nx, Ny, 1}; fullsize = {Nx, Ny, 1}; displ = {D, D, D}
    blk1: Block | size = {D*(Nx+2), D*(Ny+2), Lheight}
    blk2: Block | size = {D*(Nx+2), D*(Ny+2), Lheight + 2.5*D}
    fin: Finalize "Form Union"

Materials
  mat9: Common "Oxygen" on no domains
    def "Basic"
      dynamicviscosity = 1e-3
      ratioofspecificheat = 1.4
      heatcapacity = Cp(T)
      density = rho(pA,T)
      thermalconductivity = k(T)
      eta: Piecewise | arg = T; pieces = {150.0, 600.0, -5.55818182E-7+9.24202797E-8*T^1-8.71841492E-11*T^2+4.82983683E-14*T^3}; argunit = K; fununit = Pa*s
      Cp: Piecewise | arg = T; pieces = {150.0, 600.0, 959.514545-0.416383077*T^1+7.63158508E-4*T^2+1.46018648E-6*T^3-3.24009324E-9*T^4+1.6E-12*T^5}; argunit = K; fununit = J/(kg*K)
      rho: Analytic | expr = pA*0.032/R_const[K*mol/J]/T; args = {pA, T}; dermethod = manual; argders = {{pA, d(pA*0.032/R_const/T,pA)}, {T, d(pA*0.032/R_const/T,T)}}; fununit = kg/m^3; argunit = {Pa, K}
      k: Piecewise | arg = T; pieces = {150.0, 600.0, -0.0070110303+1.688723E-4*T^1-2.28911422E-7*T^2+1.6991453E-10*T^3}; argunit = K; fununit = W/(m*K)
    idealGas
      Rs = R_const/Mn
      heatcapacity = Cp(T)
      ratioofspecificheat = 1.4
      molarmass = 0.03199
      Cp: Piecewise | arg = T; pieces = {150.0, 600.0, 959.514545-0.416383077*T^1+7.63158508E-4*T^2+1.46018648E-6*T^3-3.24009324E-9*T^4+1.6E-12*T^5}; argunit = K; fununit = J/(kg*K)
  mat10: Common "Nylon" on no domains
    def "Basic"
      thermalexpansioncoefficient = 280e-6[1/K]
      heatcapacity = 1700[J/(kg*K)]
      relpermittivity = 4
      density = 0.9[g/cm^3]
      thermalconductivity = 0.26[W/(m*K)]
      int1: Interpolation "Thermal Conductivity"
        funcname = k
        table = 
          {45.36944804, 0.07913505311}
          {51.1976689, 0.07913505311}
          {62.85504157, 0.0782245827}
          {71.75074709, 0.0782245827}
          {84.32650325, 0.07913505311}
          {99.66392657, 0.07913505311}
          {115.9211298, 0.07959028832}
          {130.0315593, 0.07959028832}
          {146.2878315, 0.08095599393}
          {158.8645187, 0.08095599393}
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        interp = piecewisecubic
        fununit = W/(m*K)
        argunit = degC
      int2: Interpolation "Specific Heat"
        funcname = Cp
        table = 
          {50.78218016, 2.18962282}
          {56.49325129, 2.423872293}
          {63.68930879, 2.425548393}
          {71.13350621, 2.42728229}
          {77.83405451, 2.475426828}
          {86.27697655, 2.850064154}
          {94.22207752, 3.131417827}
          {101.9144148, 3.13320952}
          {109.3593829, 3.181527448}
          {117.0548027, 3.369655263}
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        interp = piecewisecubic
        fununit = J/(g*K)
        argunit = degC
      an1: Analytic "Surface Tension" | funcname = sigma; expr = 0.0343; args = T; fununit = N/m; argunit = K
    Enu "Young's modulus and Poisson's ratio"
      E = 2e9[Pa]
    rheo "Rheology"
      an1: Analytic "Parameter 1" | funcname = A; expr = 329.02; args = T; fununit = Pa*s; argunit = K
      an2: Analytic "Parameter 2" | funcname = B; expr = 3.16; args = T; fununit = s; argunit = K
      an3: Analytic "Parameter 3" | funcname = C; expr = 0.18; args = T; fununit = 1; argunit = K
      an4: Analytic "Relaxation Function" | funcname = aT; expr = exp(105.54e3 * (1/T - 1/300) / R); args = T; fununit = 1; argunit = K

Physics
  spf2: LaminarFlow on all domains
    dependent variable u2 = {u2, v2, w2}
    ShapeProperty.order_fluid = 3
    PhysicalModelProperty.IncludeGravity = 1
    fp1: FluidProperties (default)
      rho_mat = userdef
      rho = rho
      Constitutiverelation = InelasticNonNewtonian
      nonNewtonianModels = Carreau
      mu0_mat = userdef
      mu0 = mu+eta
      mu_inf_mat = userdef
      mu_inf = mu
      lam_car_mat = userdef
      lam_car = lambdap
      n_car_mat = userdef
      n_car = neta
    init1: init "Initial Values 1" (default) | u_init = {0, 0, 0}; p_init = 1 [atm]; CompensateForHydrostaticPressure = 0
    wallbc1: WallBC "Wall 1" (default)
    grav1: Gravity
    out1: OutletBoundary "Outlet 1" on boundaries 7 | p0 = 1 [atm]; NormalFlow = 1; CompensateForHydrostaticPressure = 0
    vf1: VolumeForce "Surface Tension" on all domains | F = {Fstx, Fsty, Fstz}
  pf2: PhaseField on all domains
    dependent variable phipf2
    ShapeProperty.order_phasefield = 2
    pfm1: PhaseFieldModel (default) | epsilon_pf = epsilon; chi = 0; u = {u2, v2, w2}; sigma = sigma
    init1: init "Initial Values 1" (default) | FluidInDomain = Fluid2phipf
    initfluid2: initFluid2 "Initial Values, Fluid 2" on domains 2 | FluidInDomain = Fluid1phipf
    ww1: WettedWall (default)
    out1: Outlet on boundaries 7
  ht2: HeatTransferInFluids on all domains
    dependent variable T2
    fluid1: FluidHeatTransferModel "Fluid 1" (default)
      Cp_mat = userdef
      Cp = Cp
      rho_mat = userdef
      rho = rho
      k_mat = userdef
      k = k
      u = {u2, v2, w2}
      fluidType = gasLiquid
    init1: init "Initial Values 1" (default) | Tinit = T0
    ins1: ThermalInsulation (default)
    hf1: HeatFluxBoundary "Heat Flux 1" on all boundaries | q0_input = k*(Tamb - T2) / dwidth
    hs1: HeatSource on all domains | Q0 = Qlaser
    hs2: HeatSource on all domains | Q0 = Qr
  rteeq2: PoissonEquation "RTE" on all domains
    dependent variable Grad2
    EquationForm.form = Automatic
    Units.DependentVariableQuantity = none
    Units.CustomDependentVariableUnit = W/(m^2)
    Units.CustomSourceTermUnit = W/(m^3)
    peq1: PoissonEquation "Poisson's Equation 1" (default) | f = -Qr; c = Dp1
    zflx1: ZeroFluxBoundary "Zero Flux 1" (default)
    init1: init "Initial Values 1" (default)
    flux1: FluxBoundary "Flux/Source 1" on all boundaries | g = 0.5*(4*pi*Ib - Grad2)

Mesh
  mesh4 "Mesh 4"
    size: MeshSizeDefault | hmax = 0.75*D; hmin = 0.15*D; hnarrow = 0.01; hauto = 8; custom = on
    ftet1: FreeTet "Free Tetrahedral 1" on remaining entities | optcurved = on

Studies
  std1 "Study 1"
    param: Parametric "Parametric Sweep" (disabled)
      sweeptype = filled
      pname = {Ep, vlaser}
      plistarr = {"2, 4", "100 [mm/s], 200 [mm/s], 300 [mm/s], 400 [mm/s]"}
      punit = {W, m/s}
    phasei: PhaseInitialization
    time: Transient "Time Dependent"
      tlist = range(0,0.001,0.05)
      usertol = on
      rtol = 0.1
      useinitsol = on
      initstudy = std1

Solver configurations
  sol1 "Solution 1" (study std1)
    v1: Variables "Dependent Variables 1.1"
    s1: Stationary "Stationary Solver 1.1"
      fc1: FullyCoupled | linsolver = d1; initstep = 0.01; minstep = 1.0E-6; maxiter = 50
      d1: Direct "Direct, interface distance (pf)" | linsolver = pardiso; pivotperturb = 1.0E-13
    su1: StoreSolution "Solution Store 1.1"
    v2: Variables "Dependent Variables 2.1" | resscalemethod = manual; notsolmethod = sol
    t1: Time "Time-Dependent Solver 1.1"
      tlist = range(0,0.001,1)
      rtol = 0.005
      atolglobalfactor = 0.05
      atolmethod = {comp1_GI2, global, comp1_Grad2, scaled, comp1_p2, global, comp1_phipf2, global, comp1_psi2, global, comp1_T2, global, comp1_u2, global}
      atolfactor = {comp1_GI2, 0.1, comp1_Grad2, 1, comp1_p2, 0.1, comp1_phipf2, 0.1, comp1_psi2, 0.1, comp1_T2, 0.1, comp1_u2, 0.1}
      maxorder = 2
      stabcntrl = on
      bwinitstepfrac = 0.01
      estrat = exclude
      fc1: FullyCoupled
        linsolver = d1
        maxiter = 8
        ntolfact = 0.5
        damp = 0.9
        jtech = once
        stabacc = aacc
        aaccdim = 5
        aaccmix = 0.9
        aaccdelay = 1
      d1: Direct "Direct, heat transfer variables (ht) (merged)" | linsolver = pardiso; pivotperturb = 1.0E-13
  sol2 "Solution Store 1.1" (study std1)
  sol3 "Refined Mesh Solution 1" (study std1)
  sol4 "Solution 4" (study std1)
    v1: Variables "Dependent Variables 1.1"
    s1: Stationary "Stationary Solver 1.1"
      fc1: FullyCoupled | linsolver = d1; initstep = 0.01; minstep = 1.0E-6; maxiter = 50
      d1: Direct "Direct, interface distance (pf)" | linsolver = pardiso; pivotperturb = 1.0E-13
    su1: StoreSolution "Solution Store 1"
    v2: Variables "Dependent Variables 2.1" | resscalemethod = manual; notsolmethod = sol
    t1: Time "Time-Dependent Solver 1.1"
      tlist = range(0,0.001,0.05)
      rtol = 0.1
      atolglobalfactor = 0.05
      atolmethod = {comp1_GI2, global, comp1_Grad2, scaled, comp1_p2, global, comp1_phipf2, global, comp1_psi2, global, comp1_T2, global, comp1_u2, global}
      atolfactor = {comp1_GI2, 0.1, comp1_Grad2, 1, comp1_p2, 0.1, comp1_phipf2, 0.1, comp1_psi2, 0.1, comp1_T2, 0.1, comp1_u2, 0.1}
      maxstepconstraintbdf = const
      maxstepbdf = 0.001
      maxorder = 1
      stabcntrl = on
      bwinitstepfrac = 0.01
      estrat = exclude
      fc1: FullyCoupled | linsolver = d1; dtech = auto; maxiter = 8; ntolfact = 0.05; termonres = both
      d1: Direct "Direct, heat transfer variables (ht) (merged)" | linsolver = pardiso; pivotperturb = 1.0E-13
  sol5 "Solution Store 1" (study std1)
  sol6 "Parametric Solutions 1" (study std1)
  sol7 "Parametric Solutions 2" (study std1)
  sol16 "Solution 16" (study std1)
    v1: Variables "Dependent Variables 1"
    s1: Stationary "Stationary Solver 1"
      fc1: FullyCoupled | linsolver = i1; initstep = 0.01; minstep = 1.0E-6; maxiter = 50
      i1: Iterative "AMG, interface distance (pf2)" | nlinnormuse = on; maxlinit = 1000
        mg1: Multigrid | prefun = saamg; maxcoarsedof = 50000; saamgcompwise = on
    su1: StoreSolution "Solution Store 2"
    v2: Variables "Dependent Variables 2" | notsolmethod = sol
    t1: Time "Time-Dependent Solver 1"
      tlist = range(0,0.001,0.05)
      rtol = 0.1
      atolglobalfactor = 0.05
      atolmethod = {comp1_GI2, global, comp1_Grad2, global, comp1_p2, scaled, comp1_phipf2, global, comp1_psi2, global, comp1_T2, global, comp1_u2, global}
      atolvaluemethod = {comp1_GI2, factor, comp1_Grad2, factor, comp1_p2, factor, comp1_phipf2, factor, comp1_psi2, factor, comp1_T2, factor, comp1_u2, factor}
      atolfactor = {comp1_GI2, 0.1, comp1_Grad2, 0.1, comp1_p2, 1, comp1_phipf2, 0.1, comp1_psi2, 0.1, comp1_T2, 0.1, comp1_u2, 0.1}
      atol = {comp1_GI2, 1e-3, comp1_Grad2, 1e-3, comp1_p2, 1e-3, comp1_phipf2, 1e-3, comp1_psi2, 1e-3, comp1_T2, 1e-3, comp1_u2, 1e-3}
      maxstepconstraintbdf = const
      maxstepbdf = 0.001
      maxorder = 1
      stabcntrl = on
      bwinitstepfrac = 0.01
      estrat = exclude
      rhoinf = 0.5
      predictor = constant
      dDef: Direct
      se1: Segregated
        segterm = itertol
        segiter = 5
        maxsegiter = 6
        ntolfact = 5
        segstabacc = segaacc
        segaaccdim = 3
        segaaccmix = 0.9
        ss1: SegregatedStep "Temperature" | segvar = {comp1_T2}; linsolver = i1; subdamp = 0.8; subjtech = once
        ss2: SegregatedStep "Phase field variables"
          segvar = {comp1_phipf2, comp1_psi2}
          linsolver = i2
          subdamp = 0.8
          subjtech = once
        ss3: SegregatedStep "RTE" | segvar = {comp1_Grad2}; linsolver = dDef
        ss4: SegregatedStep "Velocity u2, Pressure p2"
          segvar = {comp1_u2, comp1_p2}
          linsolver = i3
          subdamp = 0.8
          subjtech = once
        ll1: LowerLimit | lowerlimit = comp1.T2 0
      i1: Iterative "AMG, heat transfer variables (ht2)" | rhob = 20
        mg1: Multigrid | prefun = saamg; maxcoarsedof = 50000; saamgcompwise = on
      i2: Iterative "AMG, phase field variables (pf2)" | maxlinit = 50; rhob = 20
        mg1: Multigrid | prefun = saamg; maxcoarsedof = 50000
      i3: Iterative "AMG, fluid flow variables (spf2)" | maxlinit = 100; rhob = 20
        mg1: Multigrid | prefun = saamg; maxcoarsedof = 80000; strconn = 0.02; saamgcompwise = on
  sol17 "Solution Store 2" (study std1)

Datasets
  dset1: Solution | solution = sol1
  dset2: Solution | solution = sol2
  dset4: Solution | solution = sol3
  an1_ds1: Grid1D "Grid 1D 1a"
    function = all
    data = none
    par1 = T
    parmin1 = 300
    parmax1 = 400
    res1 = 10000
    distribution = mixed
  dset5: Solution | solution = sol4
  dset6: Solution | solution = sol5
  dset7: Solution | solution = sol6
  dset8: Solution | solution = sol7
  dset9: Solution | solution = sol16
  dset10: Solution | solution = sol17

Plots
  pg11: PlotGroup3D "Volume Fraction" | data = dset9
    iso1: Isosurface | expr = pf2.Vf2; levelmethod = levels; levels = 0.5, 0.7, 0.9
      tran1: Transparency | transparency = 0.65
  pg12: PlotGroup3D "Temperature" | data = dset9
    vol1: Volume "Temperature" | expr = T2
      tran1: Transparency | transparency = 0.3
  pg13: PlotGroup3D "Laser Heating" | data = dset9
    iso1: Isosurface | expr = Qlaser
  pg14: PlotGroup3D "Cross Section Volume Fraction" | data = dset9
    slc1: Slice | expr = pf2.Vf2; quickplane = zx; quickxnumber = 1; quickynumber = 1; shift = -5.5E-5

Exports
  anim1: Animation "3D Volume Fraction" | giffilename = /users/m/s/mshourya/SLS/Complete/Results/Vf2.gif; maxframes = 50
  anim2: Animation "Cross Section Volume Fraction"
    giffilename = /users/m/s/mshourya/SLS/Complete/Results/2DVf2,gif
    maxframes = 50